*Heading
** Job name: plyta+rama Model name: plyta+rama
** Generated by: Abaqus/CAE 6.14-3
*Preprint, echo=NO, model=NO, history=NO, contact=NO
**
** PARTS
**
*Part, name=Part-1
*End Part
**
*Part, name=Part-4
*Node
      1,           0.,           3.,          -2.
      2,           0.,           3.,           0.
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*Element, type=B31
1,  1,  9
2,  9, 10
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*Nset, nset=_PickedSet2_#2, internal
  2,  3,  4,  6, 15, 16
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*Elset, elset=_PickedSet2_#2, internal
  8,  9, 10, 11, 12, 13
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*Nset, nset=_PickedSet2_#3, internal
  1,  2,  3,  4,  5,  6
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*Elset, elset=_PickedSet2_#3, internal
  1,  2,  3,  4,  5,  6
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*Nset, nset=_PickedSet3_#4, internal
  1,  2,  3,  4,  5,  6
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*Elset, elset=_PickedSet3_#4, internal
  1,  2,  3,  4,  5,  6
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*Nset, nset=Set-1
  2,  3,  4,  6, 15, 16
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*Elset, elset=Set-1
  8,  9, 10, 11, 12, 13
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** Section: Section-1  Profile: Profile-1
*Beam Section, elset=_PickedSet2_#3, material=beton, temperature=GRADIENTS, section=CIRC
0.2
0.,10.,-1.
** Section: Section-1  Profile: Profile-1
*Beam Section, elset=_PickedSet2_#2, material=beton, temperature=GRADIENTS, section=CIRC
0.2
0.,10.,-1.
*End Part
**
**
** ASSEMBLY
**
*Assembly, name=Assembly
**
*Instance, name=Part-1-1, part=Part-1
*Node
      1,           0.,           0.,           0.
      2,  0.300000012,           0.,           0.
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*Element, type=S4R
  1,   1,   2,  13,  12
  2,   2,   3,  14,  13
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*Nset, nset=_PickedSet2, internal, generate
   1,  121,    1
*Elset, elset=_PickedSet2, internal, generate
   1,  100,    1
*Nset, nset=Set-1
   1,   2,   3,   4,   5,   6
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*Elset, elset=Set-1
   1,   2,   3,   4,   5,   6
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** Section: Section-2
*Shell Section, elset=_PickedSet2, material=beton
0.2, 5
*End Instance
**
*Instance, name=Part-4-1, part=Part-4
*End Instance
**
*Nset, nset=_PickedSet17, internal, instance=Part-4-1
 1, 5, 7, 8
*Surface, type=NODE, name=Part-4-1_Set-1_CNS_, internal
Part-4-1.Set-1, 1.
*Surface, type=NODE, name=Part-1-1_Set-1_CNS_, internal
Part-1-1.Set-1, 1.
** Constraint: Constraint-1
*Tie, name=Constraint-1, adjust=yes, position tolerance=0.05
Part-1-1_Set-1_CNS_, Part-4-1_Set-1_CNS_
*End Assembly
**
** MATERIALS
**
*Material, name=beton
*Density
2500.,
*Elastic
 3e+10, 0.2
**
** BOUNDARY CONDITIONS
**
** Name: BC-1 Type: Symmetry/Antisymmetry/Encastre
*Boundary
_PickedSet17, ENCASTRE
** ----------------------------------------------------------------
**
** STEP: Step-1
**
*Step, name=Step-1, nlgeom=NO, perturbation
*Frequency, eigensolver=Lanczos, acoustic coupling=on, normalization=displacement
10, , , , ,
**
** OUTPUT REQUESTS
**
*Restart, write, frequency=0
**
** FIELD OUTPUT: F-Output-1
**
*Output, field, variable=PRESELECT
*End Step
