*Heading
** Job name: plytka Model name: Model-1
** Generated by: Abaqus/CAE 6.14-3
*Preprint, echo=NO, model=NO, history=NO, contact=NO
**
** PARTS
**
*Part, name=Part-1
*Node
      1,  0.827558756,  0.300000012,           0.
      2,  0.828663707,  0.102931574,           0.
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*Element, type=S4R
  1,   1,  17, 113,  39
  2,  17,  18, 114, 113
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*Nset, nset=_PickedSet2, internal, generate
   1,  210,    1
*Elset, elset=_PickedSet2, internal, generate
   1,  162,    1
** Section: Section-1
*Shell Section, elset=_PickedSet2, material=stal
0.2, 5
*End Part
**
**
** ASSEMBLY
**
*Assembly, name=Assembly
**
*Instance, name=Part-1-1, part=Part-1
*End Instance
**
*Nset, nset=_PickedSet5, internal, instance=Part-1-1
  4,  5, 28, 29, 30, 31, 32, 33
*Elset, elset=_PickedSet5, internal, instance=Part-1-1, generate
 43,  49,   1
*Elset, elset=__PickedSurf4_E3, internal, instance=Part-1-1, generate
 156,  162,    1
*Surface, type=ELEMENT, name=_PickedSurf4, internal
__PickedSurf4_E3, E3
*End Assembly
**
** MATERIALS
**
*Material, name=stal
*Density
7850.,
*Elastic
 2e+11, 0.3
** ----------------------------------------------------------------
**
** STEP: statyka
**
*Step, name=statyka, nlgeom=NO
*Static
1., 1., 1e-05, 1.
**
** BOUNDARY CONDITIONS
**
** Name: BC-1 Type: Symmetry/Antisymmetry/Encastre
*Boundary
_PickedSet5, ENCASTRE
**
** LOADS
**
** Name: Load-1   Type: Shell edge load
*Dsload, constant resultant=YES
_PickedSurf4, EDNOR, -1e+07
**
** OUTPUT REQUESTS
**
*Restart, write, frequency=0
**
** FIELD OUTPUT: F-Output-1
**
*Output, field, variable=PRESELECT
**
** HISTORY OUTPUT: H-Output-1
**
*Output, history, variable=PRESELECT
*End Step
