*Heading
** Job name: ramka Model name: Model-2
** Generated by: Abaqus/CAE 6.14-3
*Preprint, echo=NO, model=NO, history=NO, contact=NO
**
** PARTS
**
*Part, name=Part-1
*End Part
**
**
** ASSEMBLY
**
*Assembly, name=Assembly
**
*Instance, name=Part-1-1, part=Part-1
*Node
      1,          -3.,           0.
      2,          -3.,    2.5999999
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*Element, type=B23
 1,  1,  5
 2,  5,  6
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*Nset, nset=_PickedSet2, internal, generate
  1,  39,   1
*Elset, elset=_PickedSet2, internal, generate
  1,  38,   1
** Section: Section-1  Profile: Profile-1
*Beam Section, elset=_PickedSet2, material=stal, temperature=GRADIENTS, section=CIRC
0.2
0.,0.,-1.
*End Instance
**
*Nset, nset=Set-1, instance=Part-1-1
 3,
*Nset, nset=_PickedSet5, internal, instance=Part-1-1
 2,
*Nset, nset=_PickedSet6, internal, instance=Part-1-1
 3,
*Nset, nset=_PickedSet8, internal, instance=Part-1-1
 1,
*Nset, nset=_PickedSet9, internal, instance=Part-1-1
 4,
*End Assembly
*Amplitude, name=Amp-1, definition=PERIODIC
1,              1.,              0.,              1.
             1.,              0.
**
** MATERIALS
**
*Material, name=stal
*Density
7850.,
*Elastic
 2e+11, 0.3
** ----------------------------------------------------------------
**
** STEP: Step-2
**
*Step, name=Step-2, nlgeom=NO
*Dynamic
10.,10.,1e-06
**
** BOUNDARY CONDITIONS
**
** Name: BC-1 Type: Displacement/Rotation
*Boundary
_PickedSet8, 1, 1
_PickedSet8, 2, 2
** Name: BC-2 Type: Displacement/Rotation
*Boundary
_PickedSet9, 1, 1
_PickedSet9, 2, 2
_PickedSet9, 6, 6
**
** LOADS
**
** Name: Load-1   Type: Concentrated force
*Cload
_PickedSet5, 1, 0.
_PickedSet5, 2, -10000.
** Name: Load-2   Type: Moment
*Cload, amplitude=Amp-1
_PickedSet6, 6, 10000.
**
** OUTPUT REQUESTS
**
*Restart, write, frequency=0
**
** FIELD OUTPUT: F-Output-1
**
*Output, field, frequency=1
*Node Output
U,
**
** HISTORY OUTPUT: H-Output-1
**
*Output, history, time interval=0.1
*Node Output, nset=Set-1
U1, U2, U3, UR1, UR2, UR3
*End Step
